*ELEMENT, TYPE=CONN3D2, ELSET=joint1
20001, 1, 54
20002, 2, 53
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*ELEMENT, TYPE=CONN3D2, ELSET=joint2
20046, 90, 91
20047, 88, 100
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*ELEMENT, TYPE=CONN3D2, ELSET=joint3
20091, 91, 144
20092, 92, 143
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*ELEMENT, TYPE=CONN3D2, ELSET=joint4
20136, 180, 181
20137, 178, 190
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*ELEMENT, TYPE=CONN3D2, ELSET=joint5
20181, 181, 234
20182, 182, 233
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*ELEMENT, TYPE=CONN3D2, ELSET=joint6
20226, 270, 271
20227, 268, 280
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*ELEMENT, TYPE=CONN3D2, ELSET=joint7
20271, 271, 324
20272, 272, 323
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*ELEMENT, TYPE=CONN3D2, ELSET=joint8
20316, 360, 1
20317, 358, 10
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*ELEMENT, TYPE=CONN3D2, ELSET=joint9
20361, 361, 414
20362, 362, 413
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*ELEMENT, TYPE=CONN3D2, ELSET=joint10
20397, 450, 451
20398, 448, 460
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*ELEMENT, TYPE=CONN3D2, ELSET=joint11
20433, 451, 504
20434, 452, 503
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*ELEMENT, TYPE=CONN3D2, ELSET=joint12
20469, 540, 541
20470, 538, 550
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*ELEMENT, TYPE=CONN3D2, ELSET=joint13
20505, 541, 594
20506, 542, 593
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*ELEMENT, TYPE=CONN3D2, ELSET=joint14
20541, 630, 631
20542, 628, 640
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*ELEMENT, TYPE=CONN3D2, ELSET=joint15
20577, 631, 684
20578, 632, 683
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*ELEMENT, TYPE=CONN3D2, ELSET=joint16
20613, 720, 361
20614, 718, 370
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*Connector Section, elset=joint1, behavior=hbehavior
Hinge
Orientation1
*Connector Section, elset=joint2, behavior=hbehavior
Hinge
Orientation2
*Connector Section, elset=joint3, behavior=hbehavior
Hinge
Orientation3
*Connector Section, elset=joint4, behavior=hbehavior
Hinge
Orientation4
*Connector Section, elset=joint5, behavior=hbehavior
Hinge
Orientation5
*Connector Section, elset=joint6, behavior=hbehavior
Hinge
Orientation6
*Connector Section, elset=joint7, behavior=hbehavior
Hinge
Orientation7
*Connector Section, elset=joint8, behavior=hbehavior
Hinge
Orientation8
*Connector Section, elset=joint9, behavior=hbehavior
Hinge
Orientation9
*Connector Section, elset=joint10, behavior=hbehavior
Hinge
Orientation10
*Connector Section, elset=joint11, behavior=hbehavior
Hinge
Orientation11
*Connector Section, elset=joint12, behavior=hbehavior
Hinge
Orientation12
*Connector Section, elset=joint13, behavior=hbehavior
Hinge
Orientation13
*Connector Section, elset=joint14, behavior=hbehavior
Hinge
Orientation14
*Connector Section, elset=joint15, behavior=hbehavior
Hinge
Orientation15
*Connector Section, elset=joint16, behavior=hbehavior
Hinge
Orientation16
*ORIENTATION, NAME=Orientation1
-7.0710678118654746e-01, 2.9289321881345237e-01, 6.4359425290558270e-01, 0.0000000000000000e+00, 0.0000000000000000e+00, 1.0000000000000000e+00
*ORIENTATION, NAME=Orientation2
7.0710678118654746e-01, 2.9289321881345237e-01, 6.4359425290558270e-01, 0.0000000000000000e+00, 0.0000000000000000e+00, 1.0000000000000000e+00
*ORIENTATION, NAME=Orientation3
-2.9289321881345237e-01, -7.0710678118654746e-01, 6.4359425290558270e-01, 0.0000000000000000e+00, 0.0000000000000000e+00, 1.0000000000000000e+00
*ORIENTATION, NAME=Orientation4
-2.9289321881345237e-01, 7.0710678118654746e-01, 6.4359425290558270e-01, 0.0000000000000000e+00, 0.0000000000000000e+00, 1.0000000000000000e+00
*ORIENTATION, NAME=Orientation5
7.0710678118654746e-01, -2.9289321881345237e-01, 6.4359425290558270e-01, 0.0000000000000000e+00, 0.0000000000000000e+00, 1.0000000000000000e+00
*ORIENTATION, NAME=Orientation6
-7.0710678118654746e-01, -2.9289321881345237e-01, 6.4359425290558270e-01, 0.0000000000000000e+00, 0.0000000000000000e+00, 1.0000000000000000e+00
*ORIENTATION, NAME=Orientation7
2.9289321881345237e-01, 7.0710678118654746e-01, 6.4359425290558270e-01, 0.0000000000000000e+00, 0.0000000000000000e+00, 1.0000000000000000e+00
*ORIENTATION, NAME=Orientation8
2.9289321881345237e-01, -7.0710678118654746e-01, 6.4359425290558270e-01, 0.0000000000000000e+00, 0.0000000000000000e+00, 1.0000000000000000e+00
*ORIENTATION, NAME=Orientation9
-7.0710678118654746e-01, 2.9289321881345237e-01, -6.4359425290558270e-01, 0.0000000000000000e+00, 0.0000000000000000e+00, 1.0000000000000000e+00
*ORIENTATION, NAME=Orientation10
7.0710678118654746e-01, 2.9289321881345237e-01, -6.4359425290558270e-01, 0.0000000000000000e+00, 0.0000000000000000e+00, 1.0000000000000000e+00
*ORIENTATION, NAME=Orientation11
-2.9289321881345237e-01, -7.0710678118654746e-01, -6.4359425290558270e-01, 0.0000000000000000e+00, 0.0000000000000000e+00, 1.0000000000000000e+00
*ORIENTATION, NAME=Orientation12
-2.9289321881345237e-01, 7.0710678118654746e-01, -6.4359425290558270e-01, 0.0000000000000000e+00, 0.0000000000000000e+00, 1.0000000000000000e+00
*ORIENTATION, NAME=Orientation13
7.0710678118654746e-01, -2.9289321881345237e-01, -6.4359425290558270e-01, 0.0000000000000000e+00, 0.0000000000000000e+00, 1.0000000000000000e+00
*ORIENTATION, NAME=Orientation14
-7.0710678118654746e-01, -2.9289321881345237e-01, -6.4359425290558270e-01, 0.0000000000000000e+00, 0.0000000000000000e+00, 1.0000000000000000e+00
*ORIENTATION, NAME=Orientation15
2.9289321881345237e-01, 7.0710678118654746e-01, -6.4359425290558270e-01, 0.0000000000000000e+00, 0.0000000000000000e+00, 1.0000000000000000e+00
*ORIENTATION, NAME=Orientation16
2.9289321881345237e-01, -7.0710678118654746e-01, -6.4359425290558270e-01, 0.0000000000000000e+00, 0.0000000000000000e+00, 1.0000000000000000e+00
*Connector Behavior, name=hbehavior
*Connector Elasticity, Component=4
2.35702260e-07
